*Heading
** Job name: td11_test Model name: td11
** Generated by: Abaqus/CAE 6.14-2
*Preprint, echo=NO, model=NO, history=NO, contact=NO
**
** PARTS
**
*Part, name=PART-3
*Node
1,0,-1455,1669
2,0,-1273.125,1669
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*Element, type=S4R
1,1,2,7,6
2,2,3,8,7
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*Elset, elset=Set-1, generate
  1,  192,   1
** Section: Section-1
*Shell Section, elset=Set-1, material=Material-1
6., 5
*End Part
**
**
** ASSEMBLY
**
*Assembly, name=Assembly
**
*Instance, name=PART-3-1, part=PART-3
*End Instance
**
*Nset, nset=SET-1, instance=PART-3-1, generate
 1,  5,  1
*Nset, nset=SET-2, instance=PART-3-1, generate
 251,  255,  1
*End Assembly
**
** MATERIALS
**
*Material, name=Material-1
*Density
 2.7e-09,
*Elastic
66700., 0.3
**
** BOUNDARY CONDITIONS
**
** Name: BC-1 Type: Symmetry/Antisymmetry/Encastre
*Boundary
Set-1, ENCASTRE
** Name: BC-2 Type: Symmetry/Antisymmetry/Encastre
*Boundary
Set-2, ENCASTRE
** ----------------------------------------------------------------
**
*STEP
*MATRIX GENERATE, STIFFNESS, MASS
*MATRIX OUTPUT, STIFFNESS, MASS, FORMATE=COORDINATE
*END STEP
** STEP: freq
**
*Step, name=freq, nlgeom=NO, perturbation
*Frequency, eigensolver=Lanczos, acoustic coupling=on, normalization=displacement
10, , , , ,
**
** OUTPUT REQUESTS
**
*Restart, write, frequency=0
**
** FIELD OUTPUT: F-Output-1
**
*Output, field, variable=PRESELECT
*End Step
